<?xml version="1.0" ?>
<neuroml xmlns="http://www.neuroml.org/schema/neuroml2" id="TestNeuroML">
    <izhikevich2007Cell id="izh2007RS0" C="100pF" v0="-60mV" k="0.7nS_per_mV" vr="-60mV" vt="-40mV" vpeak="35mV" a="0.03per_ms" b="-2nS" c="-50.0mV" d="100pA"/>
    <pulseGenerator id="pulseGen_0" delay="100ms" duration="800ms" amplitude="0.07 nA"/>
    <network id="IzNet">
        <population id="IzhPop0" component="izh2007RS0" size="1"/>
        <explicitInput target="IzhPop0[0]" input="pulseGen_0"/>
    </network>
</neuroml>
